*************************************
*HEADING
ICEM - ABAQUS INTERFACES VERSION 4.3.1
*************************************
*NODE, NSET=All
1, 5.55555569E-004, 9.44444444E-003, 5.55555569E-004
2, 5.55555569E-004, 9.44444444E-003, 1.11111114E-003
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*ELEMENT,TYPE=C3D8,ELSET=SYS_1_1_SOLID_ELSET
         1,         1,      6673,      6714,      6716,      5355,      6690,      6715,      7030
         2,         1,      6716,      6714,      6673,         2,      6751,      6713,      6656
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** *ELEMENT,TYPE=S4,ELSET=FACEWITHFORCES_ELSET
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** *ELEMENT,TYPE=S4,ELSET=FACEDIRICHLETBOUNDARY_ELSET
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** *ELEMENT,TYPE=S4,ELSET=FACEFORCEFORPRESTRESS_ELSET
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 ** *ELEMENT,TYPE=S4,ELSET=SYS_1_1_ELSET
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*NSET,NSET=SYS_1_1_SOLID_NSET
         1,         2,         3,         4,         5,         6
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*NSET,NSET=FACEWITHFORCES_NSET
      5986,      5987,      5988,      5989,      5990,      5991
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*NSET,NSET=FACEDIRICHLETBOUNDARY_NSET
      6040,      6041,      6042,      6043,      6044,      6045
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*NSET,NSET=FACEFORCEFORPRESTRESS_NSET
      5356,      5357,      5358,      5359,      5360,      5361
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*NSET,NSET=SYS_1_1_NSET
      4761,      4762,      4763,      4764,      4765,      4766
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
*BOUNDARY
FACEDIRICHLETBOUNDARY_NSET, 1
*BOUNDARY
FACEDIRICHLETBOUNDARY_NSET, 2
*BOUNDARY
FACEDIRICHLETBOUNDARY_NSET, 3
*Material, name =STEEL
*ELASTIC
200000000000, 0.3
*DENSITY
7850
*Solid Section, elset =SYS_1_1_SOLID_ELSET, material = STEEL
*NSET,NSET=Nall,GENERATE
1,7030

*STEP
*STATIC
*CLOAD
FACEFORCEFORPRESTRESS_NSET,3, -1.422475
*NODE OUTPUT, NSET=FACEFORCEFORPRESTRESS_NSET
PU
*NODE PRINT,NSET=SYS_1_1_SOLID_NSET
U
*EL PRINT,ELSET=SYS_1_1_SOLID_ELSET
S
*ENDSTEP
